echo both

# Define temperature parameters
variable	temperature equal 300.0 # Simulation temperature in Kelvin
variable	tempDamp equal 100.0 # Relaxation time of themostat - 0.1 ps

# Define pressure parameters
variable	pressure equal 1.0 # Pressure in bars
variable	pressureDamp equal 500.0 # Relaxation time of the barostat 0.5 ps

# Define random seed
variable	seed equal 98475

# Simulation setup
units		real
atom_style	full
variable	out_freq equal 1000 # Thermo output frequency
variable	out_freq2 equal 10 # Dump output frequency
neigh_modify    delay 10 every 1 # Neighbor list setup

### TIP4P/Ew and NaCl Potential Parameters ###
pair_style      hybrid lj/cut/coul/long 5.0 buck/coul/long 5.0 # This cutoff is too short for a real calculation
# Load configuration
read_data       data.nacl

# create groups ###

group hy type 1
group ox type 2
group na type 3
group cl type 4

## set charges - beside manually ###
set group ox charge -0.830
set group hy charge 0.415
set group na charge 1.0
set group cl charge -1.0

# Water TIP3P
pair_coeff      1 1 lj/cut/coul/long 0.0 0.0
pair_coeff      2 2 lj/cut/coul/long 0.102 3.188
pair_coeff      1 2 lj/cut/coul/long 0.0 0.0
# Mixed from Pettitt 86
pair_coeff      2 3 lj/cut/coul/long 0.1338549 2.72
pair_coeff      1 3 lj/cut/coul/long 0.1338549 1.31
pair_coeff      2 4 lj/cut/coul/long 0.359825 3.55
pair_coeff      1 4 lj/cut/coul/long 0.359825 2.14
# NaCl from Pettitt 86
pair_coeff      3 4 buck/coul/long 28929.93 0.317 161.2016
pair_coeff      3 3 buck/coul/long 9772.847 0.317 24.18024 # This is not used
pair_coeff      4 4 buck/coul/long 80312.94 0.317 1683.981 # This is not used
bond_style      harmonic
bond_coeff      1 450 0.9572
angle_style     harmonic
angle_coeff     1 55 104.52
kspace_style    pppm 1e-2 # This value is too large for a real calculation

timestep	1.0 # Timestep 2 fs
thermo          ${out_freq}
thermo_style 	custom step temp pe ke etotal press lx ly lz xy xz yz
#restart 	${out_freq} restart restart2

# Perform minimization
minimize 1.0e-2 1.0e-3 100 1000

# Write trajectory to file
dump       natrjfile na custom 300 dump.na.lammpstrj id mol type mass x y z
dump       cltrjfile cl custom 300 dump.cl.lammpstrj id mol type mass x y z
dump            1 all xyz 1 dump.alanine.xyz

# Start simulation

reset_timestep 	0

fix             1 all temp/csvr ${temperature} ${temperature} ${tempDamp} ${seed} # Bussi's thermostat
fix             2 all shake 0.0001 20 100000 t 1 2 # Shake algorithm
#fix             2 all npt temp ${temperature} ${temperature} ${tempDamp} iso ${pressure} ${pressure} ${pressureDamp}
#fix             3 all nve
fix             3 all nph iso ${pressure} ${pressure} ${pressureDamp} # Isotropic barostat
fix    		    4 all momentum 10000 linear 1 1 1 # Set total linear momentum to zero every 10000 steps

velocity        all create ${temperature} ${seed} dist gaussian

#run 10000
fix 5 all mdi
mdi
